# David Willoughby
# Post Calculations
# NDS 2012
# May 31, 2017
# DF-L #2 Properties (NDS Supplement Table 4A)
b := 1.5 in
d := 5.5 in
F_c := 1350 psi
L := 9 ft
A := b*d = 8.25 in^2
E_min := 580000 psi
l_e := L + 3/4*in - 4.5 in = 8.6875 ft
F_c_perp := 625 psi
C_D := 1.0  # Table 2.3.2 NDS
G := 0.50
C_F :=
    if d ≤ 4 in
        1.15
    else if 4 in < d ≤ 6 in
        1.1
    else if 7 in < d ≤ 8 in
        1.05
    else if 9 in < d ≤ 12 in
        1.0
    else
        0.9
    = 1.1
l_e/d = 18.9545  # Must be less than 50
c := 0.8
F_cE := 0.822*E_min/(l_e/d)^2 = 1327.01 psi
F_c_star := F_c*C_D*C_F
C_P := ((1 + F_cE/F_c_star)/(2*c) - sqrt(((1 + F_cE/F_c_star)/(2*c))^2 - F_cE/F_c_star/c)) = 0.650894
W_wood := A*l_e*G*(62.4 lbf/ft^3) = 15.5289 lbf
F_c_prime := F_c*C_D*C_F*C_P = 966.578 psi
C_P = 0.650894
C_F = 1.1
P_buckling := F_c_prime*A - W_wood = 7958.74 lbf
